ORIGIN := 1
n := 6
i := 1 .. n
j := 1 .. n
c := [
    3, 8, 5, 10, 3, 0;
    4, 1, 8, 9, 0, 1;
    7, 7, 3, 5, 3, 6;
    2, 4, 6, 6, 5, 3;
    5, 2, 8, 4, 2, 7;
    4, 0, 1, 2, 6, 9
]
e(i, j) := 1
a := matrix(n, 1, e)
b := matrix(n, 1, e)
Z(x) := sum(sum(c[i, j]*x[i, j], j = 1 .. n), i = 1 .. n)
x[n, n] := 0
Given
x*a == b
transpose(x)*a == b
x ≥ 0
x := Minimize(Z, x)
Z(x) = 9
x = [
    0, 0, 0, 0, 0, 1;
    0, 0, 0, 0, 1, 0;
    0, 0, 1, 0, 0, 0;
    1, 0, 0, 0, 0, 0;
    0, 0, 0, 1, 0, 0;
    0, 1, 0, 0, 0, 0
]
