1.
Origin := 1
x1 := 0
x2 := 0
d[1] := 3
d[2] := 4
f(x1, x2) := d[1]*x1 + d[2]*x2  # - целевая функция
A := 20
B := 24
C := 18
Given
a[1] := 2
b[1] := 4
c[1] := 0
a[1]*x1 + a[2]*x2 ≤ A
a[2] := 5
b[2] := 2
c[2] := 6
b[1]*x1 + b[2]*x2 ≤ B
c[1]*x1 + c[2]*x2 ≤ C
x1 ≥ 0
x2 ≥ 0
R := Maximize(f, x1, x2)
x1 := 5
R = [5; 2]
x2 := 2
f(x1, x2) = 23
2.
d[1] := 4
d[2] := 10
f(x1, x2) := d[1]*x1 + d[2]*x2  # - целевая функция
Given
A := 150
B := 120
C := 100
a[1]*x1 + a[2]*x2 ≥ A
a[1] := 6
b[1] := 2
c[1] := 4
a[2] := 2
b[2] := 3
c[2] := 5
b[1]*x1 + b[2]*x2 ≥ B
c[1]*x1 + c[2]*x2 ≥ C
x1 ≥ 0
x2 ≥ 0
R := Minimize(f, x1, x2)
x1 := 60
R = [60; 0]
x2 := 4*10^-15
f(x1, x2) = 240
