ORIGIN := 1
n := 5
m := 3
i := 1 .. m
j := 1 .. n
c := [22, 14, 16, 28, 30; 19, 17, 26, 36, 36; 37, 30, 31, 39, 41]
a := [350; 200; 300]
b := [170; 140; 200; 195; 145]
sumrows(x) :=
    for i ∈ 1 .. 3
        v[i] ← 0
        for j ∈ 1 .. 5
            v[i] ← v[i] + x[i, j]
    v
sumcols(x) :=
    for j ∈ 1 .. 5
        v[j] ← 0
        for i ∈ 1 .. 3
            v[j] ← v[j] + x[i, j]
    v
Z(x) := sum(sum(c[i, j]*x[i, j], j = 1 .. n), i = 1 .. m)
x[3, 5] := 0
Given
sumrows(x) == a
sumcols(x) == b
x ≥ 0
x := Minimize(Z, x)
x = [0, 110, 200, 40, 0; 170, 30, 0, 0, 0; 0, 0, 0, 155, 145]
Z(x) = 21590
